// COMSOL Multiphysics 6.2.0.415 model "il7_einzel.mph"
// Outline of the model tree

Parameters
  L_vac = 100[cm]  // Width of vacuum chamber
  R_vac = 10[cm]  // Height of vacuum chamber
  L1 = 4[mm]  // Length of 1st electrode
  L2 = 8[mm]  // Length of 2nd electrode
  L3 = 4[mm]  // Length of 3rd electrode
  D1 = 11[mm]  // Diameter of 1st electrode
  D2 = 12[mm]  // Diameter of 2nd electrode
  D3 = 10[mm]  // Diameter of 3rd electrode
  R1 = D1/2  // Radius of 1st electrode
  R2 = D2/2  // Radius of 2nd electrode
  R3 = D3/2  // Radius of 3rd electrode
  c1 = 7[mm]  // Distance between 1-2 electrodes
  c2 = 6[mm]  // Distance between 2-3 electrodes
  Te = 45[mm]  // Thickness of electrodes
  d_lens = 10[mm]  // Distance between generation of protons and electrode
  Le = 4[mm]  // Length of Plasma Electrode
  De = 5[mm]  // Diameter of Plasma Electrode
  Re = De/2  // Radius of Plasma Electrode
  ce = 32[mm]  // Distance between Plasma Electrode and 1st electrode
  Rl = 19[mm]  // Radius of LEBT tube
  Ll = 674[mm]  // Length of LEBT tube
  cl = 163.7[mm]  // Distance between last electrode and LEBT tube
  V0 = 15[kV]  // Voltage on inner electrode
  Vext = 30[kV]  // Voltage on Plasma Electrode
  E0 = 30[keV]  // Kinetic energy of particles
  vx0 = sqrt(2*E0/mp_const/3)  // Initial velocity of particles, x-component
  T = L_vac/vx0  // Time of simulation

Selections
  sel1: Explicit "Ground Boundaries" on boundaries adjacent to domains 5, 7
  sel2: Explicit "Einzel Boundary" on boundaries adjacent to domains 6
  sel3: Explicit "Extraction Boundary" on boundaries adjacent to domains 2-4
  uni1: Union "All electrode surfaces" | entitydim = 2; input = {sel1, sel2, sel3}

Geometry
  geom1 "Einzel lens + LEBT" (3D, length unit mm)
    wp1: WorkPlane | quickplane = zx; unite = on
      r1: Rectangle "First Electrode" | pos = {R1, d_lens+Le+ce}; size = {Te-R1, L1}
      fil4: Fillet "First Electrode Rounding" | point = r1(1) points 1, 4; radius = 0.9
      r2: Rectangle "Einzel Electrode" | pos = {R2, d_lens+Le+ce+L1+c1}; size = {Te-R2, L2}
      fil2: Fillet "Einzel Electrode Rounding" | point = r2(1) points 1, 4; radius = 0.9
      r3: Rectangle "Third Electrode" | pos = {R3, d_lens+Le+ce+L1+c1+L2+c2}; size = {Te-R3, L3}
      fil3: Fillet "Third Electrode Rounding" | point = r3(1) points 1, 4; radius = 0.9
      r4: Rectangle "System" | size = {R_vac, L_vac}
      pol1: Polygon "Plasma Electrode"
        source = table
        table = 
          {1.75, d_lens}
          {45, d_lens}
          {45, d_lens+Le}
          {8.678203, d_lens+Le}
          {1.75, d_lens+0.05}
          {1.75, d_lens}
      r5: Rectangle "LEBT tube" | pos = {Rl, Le+ce+L1+c1+L2+c2+L3+cl}; size = {1, Ll}
      r6: Rectangle "Plasma Chamber 1" | pos = {0, 1}; size = {Te, 1}
      r7: Rectangle "Plasma Chamber 2" | pos = {Te-1, 2}; size = {1, d_lens-2}
      ls1: LineSegment "Particle Source"
        specify1 = coord
        coord1 = {1.2, d_lens-1}
        specify2 = coord
        coord2 = {0, d_lens-1}
    rev1: Revolve "Revolution" | workplane = wp1; input = wp1; angtype = full; origfaces = off
    fin: Finalize "Form union"
  pgeom_cpt "Geometría" (1D, length unit m)
    pt1: Point "Punto 1"

Physics
  es: Electrostatics "Electrostatic" on domains 1-3
    dependent variable V
    ccn1: ChargeConservation "Conservación de carga eléctrica 1" (default) | epsilonr_mat = userdef; epsilonr = 1
    zc1: ZeroCharge "Carga nula 1" (default)
    init1: init "Valores iniciales 1" (default)
    gnd2: Ground "Grounded Vacuum Chamber Walls" on boundaries 2, 4, 6, 8, 136, 140, 144
    gnd1: Ground "Grounded Electrodes" on selection sel1
    pot1: ElectricPotential "Inner Electrode Voltage" on selection sel2 | V0 = V0
    pot2: ElectricPotential "Plasma Electrode Voltage" on selection sel3 | V0 = Vext
  cpt: ChargedParticleTracing "Charge Particle Tracing" on domains 1-3
    dependent variable q = {qx, qy, qz}
    MaximumSecondary.MaximumSecondary = 10000
    StoreParticleStatusData.StoreParticleStatusData = 0
    RelativisticCorrection.RelativisticCorrection = 0
    wall1: Wall "Pared 1" (default)
    pp1: ParticleProperties "Proton" | ParticleSpecies = UserDefined; mp = mp_const; mprest = mp_const; Z = 1
    pp2: ParticlePropertiesOther "Dihydrogen+" | mp = 2*mp_const; Z = 1
    pp3: ParticlePropertiesOther "Trihydrogen+" | mp = 3*mp_const; Z = 1
    ef1: ElectricForce "Fuerza eléctrica (#0), componente #1 1" on all domains | UsePPR = 1; E_src = root.comp1.es.Ex
    pbeam1: ParticleBeam "Haz de partículas 1" on boundaries 33-36
      BeamPosition = CentroidOfSelection
      N = 10000
      SamplingFromPhaseSpaceEllipse = Gaussian
      TransverseVelocityDistributionSpecification = SpecifyTwissParameters
      twbeta0 = 0.01[m]
      e1rms = 0.05 [mm]
      El = 0.2[eV]

Mesh
  mesh1 "Malla 1"
    size: MeshSizeDefault "Tamaño" | hmax = 100; hmin = 18; hcurve = 0.6; hnarrow = 0.5; hgrad = 1.5
    size1: Size "Tamaño 1" on selection uni1 | hauto = 2
    ftet1: FreeTet "Tetraédrico libre 1" on domains 1-3

Studies
  std1 "Electrostatic Study"
    stat: Stationary "Estacionario"
  std2 "Particle Tracing Study"
    time: Transient "Temporal"
      tunit = ns
      tlist = range(0,T/100,T*1.05)
      solve for = {cpt}
      usesol = on
      notsolmethod = sol
      notstudy = std1

Solver configurations
  sol1 "Solución 1" (study std1)
    v1: Variables "Variables dependientes 1"
    s1: Stationary "Resolvedor estacionario 1"
      fc1: FullyCoupled "Completamente acoplado 1" | linsolver = i1
      i1: Iterative "Iterativo 1" | linsolver = cg
        mg1: Multigrid "Multimalla 1" | prefun = amg; coarseningmethod = classic
  sol2 "Solución 2" (study std2)
    v1: Variables "Variables dependientes 1"
    t1: Time "Resolvedor temporal 1"
      tlist = range(0,T/100,T*1.05)
      rtol = 1.0E-5
      timemethod = genalpha
      estrat = exclude
      tstepsgenalpha = strict
      fc1: FullyCoupled "Completamente acoplado 1" | linsolver = i1; ntolfact = 0.1
      i1: Iterative "Iterativo 1"
        ja1: Jacobi

Datasets
  dset1: Solution | solution = sol1
  cpl1: CutPlane "y=0" | data = dset1; quickplane = xz
  dset2: Solution | solution = sol2
  part1: Particle "Partícula 1"
    solution = sol2
    pgeomspec = fromphysics
    pgeom = pgeom_cpt
    posdof = {comp1.qx, comp1.qy, comp1.qz}
    physicsinterface = cpt
  cpl2: CutPlane "End of Einzel Lens" | data = part1; quickx = d_lens+Le+ce+L1+c1+L2+c2+L3
  cpl3: CutPlane "Enter of Einzel Lens" | data = part1; quickx = d_lens
  cpl4: CutPlane "Pepperpot (556mm)" | data = part1; quickx = d_lens+556[mm]
  cpl5: CutPlane "Enter of LEBT" | data = part1; quickx = Le+ce+L1+c1+L2+c2+L3+cl

Plots
  pg1: PlotGroup3D "Electric Potential (3D)" | data = dset1
    mslc1: Multislice "Rebanadas múltiples 1"
      expr = V
      multiplanexmethod = coord
      xcoord = es.CPx
      multiplaneymethod = coord
      ycoord = es.CPy
      multiplanezmethod = coord
      zcoord = es.CPz
    strmsl1: StreamlineMultislice
      expr = {es.Ex, es.Ey, es.Ez}
      multiplanexmethod = coord
      xcoord = es.CPx
      multiplaneymethod = coord
      ycoord = es.CPy
      multiplanezmethod = coord
      zcoord = es.CPz
      udist = 0.02
      col1: Color "Expresión de color 1" | expr = V
      filt1: Filter "Filtro 1" | expr = !isScalingSystemDomain
  pg2: PlotGroup3D "Electric Field (3D)" | data = dset1
    mslc1: Multislice "Rebanadas múltiples 1"
      expr = es.normE
      multiplanexmethod = coord
      xcoord = es.CPx
      multiplaneymethod = coord
      ycoord = es.CPy
      multiplanezmethod = coord
      zcoord = es.CPz
    strmsl1: StreamlineMultislice
      expr = {es.Ex, es.Ey, es.Ez}
      multiplanexmethod = coord
      xcoord = es.CPx
      multiplaneymethod = coord
      ycoord = es.CPy
      multiplanezmethod = coord
      zcoord = es.CPz
      udist = 0.02
      col1: Color "Expresión de color 1" | expr = es.normE
      filt1: Filter "Filtro 1" | expr = !isScalingSystemDomain
  pg3: PlotGroup3D "Equipotential Surfaces" | data = dset1
    con1: Contour "Curva de nivel 1" | data = cpl1; expr = V
    iso1: Isosurface "Isosuperficie 1" | expr = V
      filt1: Filter "Filtro 1" | expr = y>0
    surf1: Surface "Superficie 1" | expr = 1
      sel1: Selection "Selección 1" on selection uni1
  pg4: PlotGroup2D "Fringe Field" | data = cpl1
    surf1: Surface "Superficie 1" | expr = V
    con1: Contour "Curva de nivel 1" | expr = V
    arws1: ArrowSurface "Superficie de flechas 1"
      planecoordsys = cartesian
      expr = {es.Ex, es.Ey, es.Ez}
      descr = Campo eléctrico
      arrowxmethod = coord
      xcoord = range(0,5,80)
      arrowymethod = coord
      ycoord = range(-100,5,100)
  pg5: PlotGroup3D "Particle Trajectories" | data = part1
    traj1: ParticleTrajectories "Trayectorias de partícula 1"
      col1: Color "Expresión de color 1" | expr = cpt.V
  pg9: PlotGroup2D "Particle Distribution at the Enter of Einzel Lens" | data = part1
    poma1: PoincareMap "Gráfico de Poincaré 1" | data = cpl3
      col1: Color "Expresión de color 1" | expr = cpt.mp; descr = Masa de partícula
  pg8: PlotGroup2D "Particle Distribution at the End of Einzel Lens" | data = part1
    poma1: PoincareMap "Gráfico de Poincaré 1" | data = cpl2
      col1: Color "Expresión de color 1" | expr = cpt.mp; descr = Masa de partícula
  pg10: PlotGroup2D "Particle Distribution at the Pepperpot" | data = cpl4
    poma1: PoincareMap "Gráfico de Poincaré 1" | data = cpl4
      col1: Color "Expresión de color 1" | expr = cpt.mp
  pg11: PlotGroup2D "Particle Distribution at the Enter of LEBT" | data = cpl5
    poma1: PoincareMap "Gráfico de Poincaré 1" | data = cpl5
      col1: Color "Expresión de color 1" | expr = cpt.mp

Exports
  data4: Data "stats"
    data = part1
    expr = {qx, qy, qz, cpt.ppy/cpt.ppx, cpt.ppz/cpt.ppx, cpt.vx, cpt.mp}
    unit = {mm, mm, mm, 1, 1, m/s, kg}
    descr = {"Posición de partícula, componente x", "Posición de partícula, componente y", "Posición de partícula, componente z", , , "Velocidad de partícula, componente x", Masa de partícula}
    filename = C:\Users\lopez\Documents\GitHub\gral-fisika\stats.txt
    separator = ,