// COMSOL Multiphysics 6.2.0.415 model "magnet_simulation.mph"
// Outline of the model tree

Parameters
  Mt = 80[mm]
  Mh = 2.4[mm]
  Ml = 100[mm]
  Md = 18[mm]
  Ed = 8[mm]
  Et = 10[mm]
  Ve = 3024[V]
  Ll = 80[mm]
  E0 = 30[keV]
  vf = sqrt(2*E0/mp_const)
  T = Ml/vf
  Rt = 80[mm]
  Rout = 3.12[mm]
  Rin = 5[mm]
  Iw = 80[mm]
  Ih = 10[mm]
  Rd = 48[mm]

Selections
  sel4: Explicit "Tube" on no boundaries adjacent to domains
  sel5: Explicit "Magnets" on domains 5, 6
  sel6: Explicit "Iron" on no domains

Geometry
  geom1 "Geometría 1" (3D, length unit mm)
    blk1: Block "Magnet1" | pos = {0, 0, -Md/2-Mh/2}; base = center; size = {Ml, Mt, Mh}
    blk2: Block "Magnet2" | pos = {0, 0, Mh/2+Md/2}; base = center; size = {Ml, Mt, Mh}
    blk3: Block "Air" | base = center; size = {500, 500, 500}
    wp2: WorkPlane "Beam Origin" | quickplane = yz; quickx = -50; unite = on
      c1: Circle "Círculo 1" | r = 3
    wp3: WorkPlane "Tube" (disabled) | unite = on
      r1: Rectangle "Outlet" | pos = {50, Rout}; size = {1, Rt-Rout}
      r2: Rectangle "Inlet" | pos = {-51, Rin}; size = {1, Rt-Rin}
      r3: Rectangle "Tube" | pos = {0, Rt-1}; base = center; size = {100, 2}
    rev1: Revolve "Revolucionar 1" (disabled)
      workplane = wp3
      input = wp3
      angtype = full
      origfaces = off
      axis = {1, 0}
      revaxis = {{0, 1}, {0, 0}}
    blk6: Block "Iron Plate1" | pos = {0, Mt/2+Iw/2, 0}; base = center; size = {Ml, Iw, Md+2*Mh}
    blk7: Block "Iron Plate2" | pos = {0, -Mt/2-Iw/2, 0}; base = center; size = {Ml, Iw, Md+2*Mh}
    blk8: Block "Iron Plate3" | pos = {0, 0, Md/2+Mh+Ih/2}; base = center; size = {Ml, Mt+2*Iw, Ih}
    blk9: Block "Iron Plate4" | pos = {0, 0, -Md/2-Mh-Ih/2}; base = center; size = {Ml, Mt+2*Iw, Ih}
    fin: Finalize "Formar unión"
  pgeom_cpt "Geometría" (1D, length unit m)
    pt1: Point "Punto 1"

Materials
  mat1: Common "N52 (Sintered NdFeB)" on selection sel5
    def "Basic"
      electricconductivity = 1/1.4[uohm*m]
      relpermittivity = 1
    RemanentFluxDensity
      murec = 1.05
      normBr = 1.44[T]
  mat3: Common "Air" on domains 1, 2, 4
    def "Basic"
      thermalexpansioncoefficient = alpha_p(pA,T)
      molarmass = 0.02897[kg/mol]
      bulkviscosity = muB(T)
      relpermeability = 1
      relpermittivity = 1
      dynamicviscosity = eta(T)
      ratioofspecificheat = 1.4
      electricconductivity = 0[S/m]
      heatcapacity = Cp(T)
      density = rho(pA,T)
      thermalconductivity = k(T)
      soundspeed = cs(T)
      eta: Piecewise | arg = T; pieces = {200.0, 1600.0, -8.38278E-7+8.35717342E-8*T^1-7.69429583E-11*T^2+4.6437266E-14*T^3-1.06585607E-17*T^4}; argunit = K; fununit = Pa*s
      Cp: Piecewise | arg = T; pieces = {200.0, 1600.0, 1047.63657-0.372589265*T^1+9.45304214E-4*T^2-6.02409443E-7*T^3+1.2858961E-10*T^4}; argunit = K; fununit = J/(kg*K)
      rho: Analytic | expr = pA*0.02897/R_const[K*mol/J]/T; args = {pA, T}; fununit = kg/m^3; argunit = {Pa, K}
      k: Piecewise | arg = T; pieces = {200.0, 1600.0, -0.00227583562+1.15480022E-4*T^1-7.90252856E-8*T^2+4.11702505E-11*T^3-7.43864331E-15*T^4}; argunit = K; fununit = W/(m*K)
      cs: Analytic | expr = sqrt(1.4*R_const[K*mol/J]/0.02897*T); args = T; fununit = m/s; argunit = K
      an1: Analytic | funcname = alpha_p; expr = -1/rho(pA,T)*d(rho(pA,T),T); args = {pA, T}; fununit = 1/K; argunit = {Pa, K}
      an2: Analytic "Analytic 2a" | funcname = muB; expr = 0.6*eta(T); args = T; fununit = Pa*s; argunit = K
    RefractiveIndex
      n = 1
      ki = 0
    NonlinearModel
      BA = def.gamma-1
    idealGas
      Rs = R_const/Mn
      heatcapacity = Cp(T)
      ratioofspecificheat = 1.4
      molarmass = 0.02897[kg/mol]
      Cp: Piecewise | arg = T; pieces = {200.0, 1600.0, 1047.63657-0.372589265*T^1+9.45304214E-4*T^2-6.02409443E-7*T^3+1.2858961E-10*T^4}; argunit = K; fununit = J/(kg*K)
  mat4: Common "Soft Iron (Without Losses)" on domains 2-4, 7
    def "Basic"
      electricconductivity = 0[S/m]
      relpermittivity = 1
    BHCurve
      normB = BH(normHin)
      normH = BH_inv(normBin)
      Wpm = BH_prim(normHin)
      normHin = sqrt(H1^2+H2^2+H3^2+eps)
      DESCR_PREFIX:normHin = Campo magnético, norma
      normBin = sqrt(B1^2+B2^2+B3^2+eps)
      DESCR_PREFIX:normBin = Densidad de flujo magnético, norma
      BH: Interpolation
        table = 
          {0, 0}
          {663.146, 1}
          {1067.5, 1.1}
          {1705.23, 1.2}
          {2463.11, 1.3}
          {3841.67, 1.4}
          {5425.74, 1.5}
          {7957.75, 1.6}
          {12298.3, 1.7}
          {20462.8, 1.8}
          {32169.6, 1.9}
          {61213.4, 2}
          {111408, 2.1}
          {188487.757, 2.2}
          {267930.364, 2.3}
          {347507.836, 2.4}
        extrap = linear
        fununit = T
        argunit = A/m
        defineinv = on
        defineprimfun = on
    EffectiveBHCurve
      normBeff = BHeff(normHeffin)
      normHeff = BHeff_inv(normBeffin)
      normHeffin = sqrt(realdot(H1,H1)+realdot(H2,H2)+realdot(H3,H3)+eps)
      DESCR_PREFIX:normHeffin = Campo magnético tangencial, norma
      normBeffin = sqrt(realdot(B1,B1)+realdot(B2,B2)+realdot(B3,B3)+eps)
      DESCR_PREFIX:normBeffin = Densidad de flujo magnético tangencial, norma
      BHeff: Interpolation
        table = 
          {0, 0}
          {663.146, 1.00000005169}
          {1067.5, 1.49364951241}
          {1705.23, 1.94153284613}
          {2463.11, 2.25776566937}
          {3841.67, 2.60998064243}
          {5425.74, 2.86644520908}
          {7957.75, 3.14414380972}
          {12298.3, 3.44853805165}
          {20462.8, 3.78167119737}
          {32169.6, 4.05834559011}
          {61213.4, 4.42064655295}
          {111408, 4.72127408955}
          {188487.757, 4.97214814072}
          {267930.364, 5.14551086086}
          {347507.836, 5.24551086143}
        extrap = linear
        fununit = T
        argunit = A/m
        defineinv = on

Physics
  mf: InductionCurrents "Campos magnéticos" on all domains
    dependent variable A = {Ax, Ay, Az}
    fsp1: FreeSpace "Espacio libre 1" (default) | freqType = from_solver; sigma_stab_mat = automatic
    mi1: MagneticInsulation "Aislamiento magnético 1" (default)
    init1: init "Valores iniciales 1" (default)
    mag1: Magnet on domains 5
      north1: North on boundaries 20
      south1: South on boundaries 18
    mag2: Magnet on domains 6
      north1: North on boundaries 24
      south1: South on boundaries 23
    als1: AmperesLawSolid "Ampère's Law in Solids 1" on domains 2-4, 7 | ConstitutiveRelationBH = BHCurve
  cpt: ChargedParticleTracing "Trazado de partículas con carga" on all domains
    dependent variable q = {qx, qy, qz}
    wall1: Wall "Pared 1" (default)
    pp1: ParticleProperties "Propiedades de partícula 1" | mp = mp_const; Z = 1
    pbeam1: ParticleBeam "Haz de partículas 1" on boundaries 25
      N = 5000
      e1rms = 0.002565[mm]
      El = 30[keV]
      ReverseDirection = 1
    mf1: MagneticForce "Fuerza magnética (#0), componente #1 1" on domains 1, 2, 4-6 | B_src = root.comp1.mf.Bx
    ef1: ElectricForce "Fuerza eléctrica (#0), componente #1 1" on domains 1, 2, 4-6 | E = {0, 686673.67, 0}

Mesh
  mesh1 "Malla 1"
    size: MeshSizeDefault "Tamaño" | hauto = 3
    size1: Size "Tamaño 1" on selection sel5 | hauto = 2
    size2: Size "Tamaño 2" on domains 2-4, 7 | hauto = 2
    ftet1: FreeTet "Tetraédrico libre 1" on remaining entities

Studies
  std1 "Estudio 1"
    stat: Stationary "Estacionario"
  std2 "Estudio 2"
    time: Transient "Temporal"
      tunit = ns
      tlist = range(0,T/20,T*1.05)
      solve for = {cpt}
      usesol = on
      notsolmethod = sol
      notstudy = std1

Solver configurations
  sol1 "Solución 1" (study std1)
    v1: Variables "Variables dependientes 1"
    s1: Stationary "Resolvedor estacionario 1"
      fc1: FullyCoupled "Completamente acoplado 1" | linsolver = i1; maxiter = 100; jtech = once
      i1: Iterative "Iterativo 1" | linsolver = fgmres; nlinnormuse = on
        mg1: Multigrid "Multimalla 1"
  sol2 "Solución 2" (study std2)
    v1: Variables "Variables dependientes 1"
    t1: Time "Resolvedor temporal 1"
      tlist = range(0,T/20,T*1.05)
      rtol = 1.0E-5
      timemethod = genalpha
      estrat = exclude
      tstepsgenalpha = strict
      rhoinf = 1
      fc1: FullyCoupled "Completamente acoplado 1" | linsolver = i1; ntolfact = 0.1
      i1: Iterative "Iterativo 1"
        ja1: Jacobi

Datasets
  dset1: Solution | solution = sol1
  cln1: CutLine3D "x direction" | data = dset1; genpoints = {{-50, 0, 0}, {50, 0, 0}}
  cln2: CutLine3D "y direction" | data = dset1; genpoints = {{0, -5, 0}, {0, 5, 0}}; pddir = {0, 1, 0}
  cln3: CutLine3D "z direction" | data = dset1; genpoints = {{0, 0, -5}, {0, 0, 5}}
  cpl1: CutPlane "Plano de corte 1" | data = part1; quickx = 50
  dset2: Solution | solution = sol2
  part1: Particle "Partícula 1"
    solution = sol2
    pgeomspec = fromphysics
    pgeom = pgeom_cpt
    posdof = {comp1.qx, comp1.qy, comp1.qz}
    physicsinterface = cpt

Plots
  pg1: PlotGroup3D "Densidad de flujo magnético, norma (mf)" | data = dset1
    mslc1: Multislice "Rebanadas múltiples 1"
      data = dset1
      expr = mf.normB
      multiplanexmethod = coord
      xcoord = mf.CPx
      multiplaneymethod = coord
      ycoord = mf.CPy
      multiplanezmethod = coord
      zcoord = mf.CPz
    strmsl1: StreamlineMultislice
      expr = {mf.Bx, mf.By, mf.Bz}
      multiplanexmethod = coord
      xcoord = mf.CPx
      multiplaneymethod = coord
      ycoord = mf.CPy
      multiplanezmethod = coord
      zcoord = mf.CPz
      udist = 0.02
      col1: Color "Expresión de color 1" | expr = mf.normB
      filt1: Filter "Filtro 1" | expr = !isScalingSystemDomain
  pg5: PlotGroup3D "Campo eléctrico, norma (es)" | data = dset1
    mslc1: Multislice "Rebanadas múltiples 1"
      expr = es.normE
      multiplanexmethod = coord
      xcoord = es.CPx
      multiplaneymethod = coord
      ycoord = es.CPy
      multiplanezmethod = coord
      zcoord = es.CPz
    strmsl1: StreamlineMultislice
      expr = {es.Ex, es.Ey, es.Ez}
      multiplanexmethod = coord
      xcoord = es.CPx
      multiplaneymethod = coord
      ycoord = es.CPy
      multiplanezmethod = coord
      zcoord = es.CPz
      udist = 0.02
      col1: Color "Expresión de color 1" | expr = es.normE
      filt1: Filter "Filtro 1" | expr = !isScalingSystemDomain
  pg8: PlotGroup3D "Potencial eléctrico (es)" | data = dset1
    mslc1: Multislice "Rebanadas múltiples 1"
      expr = V
      multiplanexmethod = coord
      xcoord = es.CPx
      multiplaneymethod = coord
      ycoord = es.CPy
      multiplanezmethod = coord
      zcoord = es.CPz
    strmsl1: StreamlineMultislice
      expr = {es.Ex, es.Ey, es.Ez}
      multiplanexmethod = coord
      xcoord = es.CPx
      multiplaneymethod = coord
      ycoord = es.CPy
      multiplanezmethod = coord
      zcoord = es.CPz
      udist = 0.02
      col1: Color "Expresión de color 1" | expr = V
      filt1: Filter "Filtro 1" | expr = !isScalingSystemDomain
  pg11: PlotGroup1D "Magnetic Flux Density x-direction" | data = dset1
    lngr1: LineGraph "Gráfico lineal 1" | data = cln1; expr = mf.normB; descr = Densidad de flujo magnético, norma
  pg2: PlotGroup1D "Magnetic Flux Density y-direction" | data = dset1
    lngr1: LineGraph "Gráfico lineal 1" | data = cln2; expr = mf.normB
  pg12: PlotGroup1D "Magnetic Flux Density z-direction" | data = dset1
    lngr1: LineGraph "Gráfico lineal 1" | data = cln3; expr = mf.normB
  pg13: PlotGroup3D "Trayectorias de partícula (cpt)" | data = part1
    traj1: ParticleTrajectories "Trayectorias de partícula 1"
      col1: Color "Expresión de color 1" | expr = cpt.V
  pg14: PlotGroup3D "Posición media del haz (cpt)" | data = part1
    pttraj1: PointTrajectories "Trayectorias de puntos 1"
      plotdata = global
      globalexpr = {cpt.qavx, cpt.qavy, cpt.qavz}
      expr = {cpt.qavx, cpt.qavy, cpt.qavz}
      col1: Color "Expresión de color 1" | expr = cpt.e1hrms
  pg15: PlotGroup2D "Grupo gráfico 2D 15" | data = part1
    poma1: PoincareMap "Gráfico de Poincaré 1" | data = cpl1