// COMSOL Multiphysics 6.2.0.415 model "wien_filter.mph"
// Outline of the model tree

Parameters
  Lt = 90[mm]  // Tube length.
  Rt = 30[mm]  // Tube radius.
  Rin = 5[mm]  // Inlet radius.
  Rout = 3[mm]  // Outlet radius.
  Le = 8[mm]  // Electrode length.
  Ve = 3596.405[V]
  Ld = 12[mm]  // Distance between electrodes.
  Mt = 12[mm]  // Magnet thickness.
  Mh = 12[mm]  // Magnet height.
  E0 = 30[keV]
  vx0 = sqrt(2*E0/3/mp_const)
  T = Lt/vx0
  Md = 10[mm]  // Distance between magnets.

Selections
  sel1: Explicit "Upper Electrode" on boundaries adjacent to domains 11
  sel2: Explicit "Lower Electrode" on boundaries adjacent to domains 12
  sel3: Explicit "Left Magnet" on boundaries adjacent to domains 8, 9
  sel4: Explicit "Right Magnet" on boundaries adjacent to domains 9
  uni1: Union "All electrode surfaces" | entitydim = 2; input = {sel1, sel2}
  uni2: Union "All magnet surfaces" | entitydim = 2; input = {sel3, sel4}

Geometry
  geom1 "Geometría 1" (3D, length unit mm)
    blk1: Block "Magnet 1" | pos = {0, 0, -Md/2-Mh/2}; ax2 = {0.0, 0.0}; base = center; size = {Lt, Mt, Mh}
    blk2: Block "Magnet 2" | pos = {0, 0, Md/2+Mh/2}; ax2 = {0.0, 0.0}; base = center; size = {Lt, Mt, Mh}
    cyl1: Cylinder "Air" | pos = {-100, 0, 0}; axistype = x; r = 100; h = 200
    wp1: WorkPlane "Covering" | unite = on
      r1: Rectangle "Rectángulo 1" | pos = {0, Rt+0.5}; base = center; size = {Lt, 1}
      r2: Rectangle "Inlet" | pos = {-Lt/2-2, Rin}; size = {2, Rt-Rin+1}
      r3: Rectangle "Outlet" | pos = {Lt/2, Rout}; size = {2, Rt-Rout+1}
      ls1: LineSegment "Segmento de línea 1"
        specify1 = coord
        coord1 = {-Lt/2-2, 0}
        specify2 = coord
        coord2 = {-Lt/2-2, -3}
    rev1: Revolve "Revolucionar 1"
      workplane = wp1
      input = wp1
      angtype = full
      origfaces = off
      axis = {1, 0}
      revaxis = {{0, 1}, {0, 0}}
    blk3: Block "Upper Electrode" | pos = {0, Ld/2, 0}; base = center; size = {Lt-6, 1, Le}
    blk4: Block "Lower Electrode" | pos = {0, -Ld/2, 0}; base = center; size = {Lt-6, 1, Le}
    blk5: Block "Iron Yoke 1" | pos = {0, -15, 0}; base = center; size = {Lt, 6, Md+2*Mh}
    blk6: Block "Iron Yoke 2" | pos = {0, 15, 0}; base = center; size = {Lt, 6, Md+2*Mh}
    blk7: Block "Iron Yoke 3" | pos = {0, 0, -Mt-3*Md/4}; base = center; size = {Lt, Mt+24, Md/2}
    blk8: Block "Iron Yoke 4" | pos = {0, 0, Mt+3*Md/4}; base = center; size = {Lt, Mt+24, Md/2}
    fin: Finalize "Formar unión"
  pgeom_cpt "Geometría" (1D, length unit m)
    pt1: Point "Punto 1"

Materials
  mat1: Common "N52 (Sintered NdFeB)" on domains 8, 9
    def "Basic"
      electricconductivity = 1/1.4[uohm*m]
      relpermittivity = 1
    RemanentFluxDensity
      murec = 1.05
      normBr = 1.44[T]
  mat2: Common "Soft Iron (With Losses)" on domains 5-7, 10
    def "Basic"
      electricconductivity = 1.12e7[S/m]
      relpermittivity = 1
      relpermeability = 5000
    BHCurve
      normB = BH(normHin)
      normH = BH_inv(normBin)
      Wpm = BH_prim(normHin)
      normHin = sqrt(H1^2+H2^2+H3^2+eps)
      DESCR_PREFIX:normHin = Campo magnético, norma
      normBin = sqrt(B1^2+B2^2+B3^2+eps)
      DESCR_PREFIX:normBin = Densidad de flujo magnético, norma
      BH: Interpolation
        table = 
          {0, 0}
          {663.146, 1}
          {1067.5, 1.1}
          {1705.23, 1.2}
          {2463.11, 1.3}
          {3841.67, 1.4}
          {5425.74, 1.5}
          {7957.75, 1.6}
          {12298.3, 1.7}
          {20462.8, 1.8}
          {32169.6, 1.9}
          {61213.4, 2}
          {111408, 2.1}
          {188487.757, 2.2}
          {267930.364, 2.3}
          {347507.836, 2.4}
        extrap = linear
        fununit = T
        argunit = A/m
        defineinv = on
        defineprimfun = on
    EffectiveBHCurve
      normBeff = BHeff(normHeffin)
      normHeff = BHeff_inv(normBeffin)
      normHeffin = sqrt(realdot(H1,H1)+realdot(H2,H2)+realdot(H3,H3)+eps)
      DESCR_PREFIX:normHeffin = Campo magnético tangencial, norma
      normBeffin = sqrt(realdot(B1,B1)+realdot(B2,B2)+realdot(B3,B3)+eps)
      DESCR_PREFIX:normBeffin = Densidad de flujo magnético tangencial, norma
      BHeff: Interpolation
        table = 
          {0, 0}
          {663.146, 1.00000005169}
          {1067.5, 1.49364951241}
          {1705.23, 1.94153284613}
          {2463.11, 2.25776566937}
          {3841.67, 2.60998064243}
          {5425.74, 2.86644520908}
          {7957.75, 3.14414380972}
          {12298.3, 3.44853805165}
          {20462.8, 3.78167119737}
          {32169.6, 4.05834559011}
          {61213.4, 4.42064655295}
          {111408, 4.72127408955}
          {188487.757, 4.97214814072}
          {267930.364, 5.14551086086}
          {347507.836, 5.24551086143}
        extrap = linear
        fununit = T
        argunit = A/m
        defineinv = on

Physics
  es: Electrostatics "Electroestática" on all domains
    dependent variable V
    ccn1: ChargeConservation "Conservación de carga eléctrica 1" (default) | epsilonr_mat = userdef; epsilonr = 1
    zc1: ZeroCharge "Carga nula 1" (default)
    init1: init "Valores iniciales 1" (default)
    pot1: ElectricPotential "Lower Potential" on selection sel2 | V0 = -Ve
    pot2: ElectricPotential "Upper Potential" on selection sel1 | V0 = Ve
    gnd1: Ground "Grounded Vacuum Chamber Walls" on boundaries 2-5, 24, 28, 29, 55, 57, 67
  mf: InductionCurrents "Campos magnéticos" on all domains
    dependent variable A = {Ax, Ay, Az}
    fsp1: FreeSpace "Espacio libre 1" (default) | freqType = from_solver; sigma_stab_mat = userdef; sigma_stab = 1
    mi1: MagneticInsulation "Aislamiento magnético 1" (default)
    init1: init "Valores iniciales 1" (default)
    mag1: Magnet on domains 8
      PatternType = NoPattern
      ConstitutiveRelationBH = RemanentFluxDensity
      mur_crel_BH_RemanentFluxDensity_mat = from_mat
      normBr_crel_BH_RemanentFluxDensity_mat = from_mat
      ConstrainForInducedCurrents = NoInducedCurrentsConstrain
      sigma_mat = from_mat
      north1: North on boundaries 49
      south1: South on boundaries 48
    mag2: Magnet on domains 9
      PatternType = NoPattern
      ConstitutiveRelationBH = RemanentFluxDensity
      mur_crel_BH_RemanentFluxDensity_mat = from_mat
      normBr_crel_BH_RemanentFluxDensity_mat = from_mat
      ConstrainForInducedCurrents = NoInducedCurrentsConstrain
      sigma_mat = from_mat
      north1: North on boundaries 53
      south1: South on boundaries 52
    als1: AmperesLawSolid "Ampère's Law in Solids 1" on domains 5-7, 10 | ConstitutiveRelationBH = BHCurve
  cpt: ChargedParticleTracing "Trazado de partículas con carga" on all domains
    dependent variable q = {qx, qy, qz}
    wall1: Wall "Pared 1" (default)
    pp1: ParticleProperties "Propiedades de partícula 1" | mp = mp_const; Z = 1
    pp2: ParticlePropertiesOther "Propiedades de partícula 2" | mp = 2*mp_const; Z = 1
    pp3: ParticlePropertiesOther "Propiedades de partícula 3" | mp = 3*mp_const; Z = 1
    wall2: Wall "Pared 2" on selection uni1 | WallCondition = Disappear
    wall3: Wall "Pared 3" on selection uni2 | WallCondition = Disappear
    wall4: Wall "Pared 4" on boundaries 96, 97, 101-103, 110, 113 | WallCondition = Disappear
    ef1: ElectricForce "Fuerza eléctrica (#0), componente #1 1" on domains 1, 4, 5, 7, 11, 12
      E_src = userdef
      E = {0, 479520.7188, 0}
    mf1: MagneticForce "Fuerza magnética (#0), componente #1 1" on domains 1, 4, 5, 7, 11, 12
      B_src = userdef
      B = {0, 0, 0.2}
    inl1: Inlet "Entrada 1" on boundaries 12, 13, 17, 18
      InitialPosition = RandomPosition
      N = 10000
      InitialVelocity = KineticEnergyAndDirection
      Ep0 = E0
    inl2: Inlet "Entrada 2" on boundaries 12, 13, 17, 18
      TimeDistributionFunction = ListOfValues
      InitialPosition = RandomPosition
      N = 5000
      InitialVelocity = KineticEnergyAndDirection
      Ep0 = E0
      ReleasedParticleProperties = pp2
    inl3: Inlet "Entrada 3" on boundaries 12, 13, 17, 18
      InitialPosition = RandomPosition
      N = 5000
      InitialVelocity = KineticEnergyAndDirection
      Ep0 = E0
      ReleasedParticleProperties = pp3

Mesh
  mesh1 "Malla 1"
    size: MeshSizeDefault "Tamaño" | hmax = 20; hmin = 3.6; hcurve = 0.6; hnarrow = 0.5; hgrad = 1.5
    size1: Size "Tamaño 1" on selection uni1 | hauto = 2
    size2: Size "Tamaño 2" on selection uni2 | hauto = 2
    ftet1: FreeTet "Tetraédrico libre 1" on remaining entities

Studies
  std1 "Estudio 1"
    stat: Stationary "Estacionario"
  std2 "Estudio 2"
    time: Transient "Temporal"
      tunit = ns
      tlist = range(0,T/100,T*1.05)
      solve for = {cpt}
      usesol = on
      notsolmethod = sol
      notstudy = std1

Solver configurations
  sol1 "Solución 1" (study std1)
    v1: Variables "Variables dependientes 1"
    s1: Stationary "Resolvedor estacionario 1"
      se1: Segregated "Segregado 1"
        ss1: SegregatedStep "Electroestática" | segvar = {comp1_V}; linsolver = i1
        ss2: SegregatedStep "Campos magnéticos" | segvar = {comp1_A}; linsolver = i2
      i1: Iterative "Iterativo 1" | linsolver = cg
        mg1: Multigrid "Multimalla 1" | prefun = amg; coarseningmethod = classic
      i2: Iterative "Iterativo 2" | linsolver = fgmres; nlinnormuse = on
        mg1: Multigrid "Multimalla 1"
  sol2 "Solución 2" (study std2)
    v1: Variables "Variables dependientes 1"
    t1: Time "Resolvedor temporal 1"
      tlist = range(0,T/100,T*1.05)
      rtol = 1.0E-5
      timemethod = genalpha
      estrat = exclude
      tstepsgenalpha = strict
      rhoinf = 1
      fc1: FullyCoupled "Completamente acoplado 1" | linsolver = i1; ntolfact = 0.1
      i1: Iterative "Iterativo 1"
        ja1: Jacobi

Datasets
  dset1: Solution | solution = sol1
  dset2: Solution | solution = sol2
  part1: Particle "Partícula 1"
    solution = sol2
    pgeomspec = fromphysics
    pgeom = pgeom_cpt
    posdof = {comp1.qx, comp1.qy, comp1.qz}
    physicsinterface = cpt
  cpl1: CutPlane "z=0" | data = dset1; quickplane = xy
  cpl2: CutPlane "y=0" | data = dset1; quickplane = xz
  cpl3: CutPlane "x=0" | data = dset1
  cln1: CutLine2D "Linea de corte en 2D 1" | data = cpl1; genpoints = {{-40, 0}, {40, 0}}

Tables
  tbl1: Table "Tabla 1"
    // Máximo de superficie 2
    Campo eléctrico, norma (V/m)
    843204
  tbl2: Table "Tabla 2"
    // Máximo de superficie 1
    Densidad de flujo magnético, norma (T)
    0.893468

Plots
  pg1: PlotGroup3D "Potencial eléctrico (es)" | data = dset1
    mslc1: Multislice "Rebanadas múltiples 1"
      expr = V
      multiplanexmethod = coord
      xcoord = es.CPx
      multiplaneymethod = coord
      ycoord = es.CPy
      multiplanezmethod = coord
      zcoord = es.CPz
    strmsl1: StreamlineMultislice
      expr = {es.Ex, es.Ey, es.Ez}
      multiplanexmethod = coord
      xcoord = es.CPx
      multiplaneymethod = coord
      ycoord = es.CPy
      multiplanezmethod = coord
      zcoord = es.CPz
      udist = 0.02
      col1: Color "Expresión de color 1" | expr = V
      filt1: Filter "Filtro 1" | expr = !isScalingSystemDomain
  pg2: PlotGroup3D "Campo eléctrico, norma (es)" | data = dset1
    mslc1: Multislice "Rebanadas múltiples 1"
      expr = es.normE
      multiplanexmethod = coord
      xcoord = es.CPx
      multiplaneymethod = coord
      ycoord = es.CPy
      multiplanezmethod = coord
      zcoord = es.CPz
    strmsl1: StreamlineMultislice
      expr = {es.Ex, es.Ey, es.Ez}
      multiplanexmethod = coord
      xcoord = es.CPx
      multiplaneymethod = coord
      ycoord = es.CPy
      multiplanezmethod = coord
      zcoord = es.CPz
      udist = 0.02
      col1: Color "Expresión de color 1" | expr = es.normE
      filt1: Filter "Filtro 1" | expr = !isScalingSystemDomain
  pg3: PlotGroup3D "Densidad de flujo magnético, norma (mf)" | data = dset1
    mslc1: Multislice "Rebanadas múltiples 1"
      expr = mf.normB
      multiplanexmethod = coord
      xcoord = mf.CPx
      multiplaneymethod = coord
      ycoord = mf.CPy
      multiplanezmethod = coord
      zcoord = mf.CPz
    strmsl1: StreamlineMultislice
      expr = {mf.Bx, mf.By, mf.Bz}
      multiplanexmethod = coord
      xcoord = mf.CPx
      multiplaneymethod = coord
      ycoord = mf.CPy
      multiplanezmethod = coord
      zcoord = mf.CPz
      udist = 0.02
      col1: Color "Expresión de color 1" | expr = mf.normB
      filt1: Filter "Filtro 1" | expr = !isScalingSystemDomain
  pg4: PlotGroup3D "Trayectorias de partícula (cpt)" | data = part1
    traj1: ParticleTrajectories "Trayectorias de partícula 1"
      col1: Color "Expresión de color 1" | expr = cpt.V
  pg5: PlotGroup1D "E,B distribution" | data = cpl1
    lngr1: LineGraph "Gráfico lineal 1" | data = cln1; expr = mf.normB/(0.688); xdata = spacevar
    lngr2: LineGraph "Gráfico lineal 2" | data = cln1; expr = es.normE/(6.2E5); xdata = spacevar
  pg7: PlotGroup1D "E/B distribution" | data = dset1
    lngr1: LineGraph "Gráfico lineal 1" | data = cln1; expr = es.normE/mf.normB; xdata = spacevar
  pg6: PlotGroup2D "Magnetic Flux Density" | data = cpl2
    surf1: Surface "Superficie 1" | expr = mf.normB; descr = Densidad de flujo magnético, norma
    arws1: ArrowSurface "Superficie de flechas 1"
      expr = {mf.Bx, mf.Bz}
      descr = Densidad de flujo magnético
      xnumber = 50
      ynumber = 50
  pg8: PlotGroup2D "Electric Field" | data = cpl3
    surf1: Surface "Superficie 1" | data = cpl3; expr = es.normE; descr = Campo eléctrico, norma